Si(x) := integral(sin(y)/y, y = 0 .. x)
ε2min(R) := 1 - 2/π*Si(2*π*R)
R := 1, 2 .. 20
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R := 5
F := 3600
Nф := 17
B := 4
Ts := R/F
θ := B/(Nф - 1) = 0.25
K0 := 1
fд := F/θ = 14400
α := B/(2*θ) = 8
N := 2*α + 1
n := 0, 1 .. N
g(n) :=
    F*K0*sin(π*B)/(π*B) if n == 0 or n == N - 1
    (2*F*K0) if n == α
    (2*F*K0*sin(2*π*θ*(n - α))/(2*π*θ*(n - α))) otherwise
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b[n] := g(n)/fд
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b[0] = -9.74511e-18
b[1] = -0.0454728
b[2] = 1.94902e-17
b[3] = 0.063662
b[4] = -1.94902e-17
b[5] = -0.106103
b[6] = 1.94902e-17
Ns := Ts*fд + 1
b[7] = 0.31831
b[8] = 0.5
S(n) :=
    0 if n < 0
    1/2 if n == 0
    1 if n > 0 and n < Ns - 1
    1/2 if n == Ns - 1
    0 if n > Ns - 1
n := -1, 0 .. Ns
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'
Ns = 21
E := sum(S(k)^2, k = 0 .. Ns - 1) = 19.5
