A := 1
N := 1024
t := 0 .. N - 1
k := 0 .. N/2
ω := 50
ωd :=
    floor(FRAME/2) if 0 ≤ FRAME ≤ 100
    50 if FRAME ≥ 100
Ω :=
    1 if 0 ≤ FRAME ≤ 100
    floor(FRAME/10)*5 if FRAME > 100
a[t] := A*cos(ω*t*2*π/N + ωd/Ω*sin(2*π*t*Ω/N))
b := fft(a)
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